units metal
dimension 3
boundary p p p
atom_style atomic
atom_modify map array

# Number of box replicates
variable nr equal 17

# File names
variable outfolder string "confs"
variable outdata string "${outfolder}/WMo_${nr}.data"

# Fraction of each atomic component
variable fW equal 0.5
variable fMo equal 0.5

# 'Reasonable' initial lattice parameter for BCC
variable fccWMo equal 3.165

lattice bcc ${fccWMo}
region box block 0 1 0 1 0 1 units lattice
create_box 2 box
create_atoms 1 box
replicate ${nr} ${nr} ${nr}

# labelmap atom 1 W 2 Mo
set type 1 type/fraction 2 $(v_fMo) 1234567

pair_style eam/alloy
pair_coeff * * eam-potentials/CuAgAuNiPdPtAlPbFeMoTaWMgCoTiZr_Zhou04.eam.alloy W Mo
neighbor 2.0 bin
neigh_modify delay 0 every 1 check yes

# Energy minimization
fix 1 all box/relax iso 0.0 vmax 0.001
thermo 10
thermo_style custom step pe lx ly lz press
min_style cg
minimize 1e-4 1e-5 1000 10000

write_data ${outdata}
